# Lammps input script for equilibrating a DA melt

units           real    # angstroms,kCal/mol,Daltons,Kelvin
atom_style      pqeq    # select column format for Atoms section
pair_style      hybrid/overlay coul/pqeqgauss 0.00 12.5 lj/cut 10.0 8.0	 # cutoffLJ cutoff_coulomb
bond_style	harmonic        #parameters needed: k_bond, r0
angle_style	harmonic        #parameters needed: k_theta, theta0
dihedral_style  opls
special_bonds   lj 0 0 .5 coul 0 0 .5
improper_style  cvff
#kspace_style     ewald 1e-4     # long-range electrostatics sum method
kspace_style    none
pair_modify     pair lj/cut mix arithmetic	 #using Lorenz-Berthelot mixing rules
pair_modify     pair coul/pqeqgauss mix geometric
read_restart    {Restart_In}
dielectric      1.0

{Dihedral_Coeffs}


timestep      1.0
thermo        1000
thermo_style  custom step temp density etotal ke pe ebond eangle edihed eimp evdwl ecoul elong vol enthalpy
neighbor      10.0 bin
neigh_modify  delay 0 every 100 check no page 1000000 one 100000
run_style     verlet

# Declare Variables

variable        volume equal "vol"
variable        dens equal "density"
variable        temperature equal "temp"
variable        Enthalpy equal "enthalpy"
run 0


#fix             pqeq all pqeq method 2 nevery 1 charge 0.0 tolerance 1.0e-6 damp 1.0

fix def1 all print 100 "${{temperature}} ${{volume}} ${{dens}} ${{Enthalpy}}" append Thermo_{Temp_In}_{Temp_Out}.txt screen no

fix SH all shake 0.0001 20 0 m 1.008
dump 1 all custom 100000 {Name}_{count}.lammpstrj id type mol x y z ix iy iz
fix 7 all nvt temp {Temp_In} {Temp_Out} 10000.0
fix 10 all momentum 1000 linear 1 1 1
fix pqeq all pqeq method 2 nevery 1 charge 0.0 tolerance 1.0e-6 damp 1.0
run {Steps}

write_restart {Restart_Out}
